*Heading
** Job name: Opt-Process-1-Job Model name: Model-1
** Generated by: Abaqus/CAE 6.14-1
*Preprint, echo=NO, model=NO, history=NO, contact=NO
** ----------------------------------------------------------------
**
** PART INSTANCE: Part-1-1
**
*Node
      1,          50.,           0.,           0.
      2,           0.,           0.,           0.
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*Element, type=S4R
  1, 112, 113, 255, 208
  2, 113, 114, 256, 255
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*Nset, nset=Part-1-1_Set-1, generate
    1,  1205,     1
*Elset, elset=Part-1-1_Set-1, generate
    1,  1114,     1
** Section: Section-1
*Shell Section, elset=Part-1-1_Set-1, material=steel
1., 5
*System
*Nset, nset=Set-1
 7,
*Nset, nset=Set-2
 5,
*Nset, nset=Set-3
 2,
*Nset, nset=Set-4
 1,
*Nset, nset=Set-5
 10,
*Nset, nset=Set-6, generate
    1,  1205,     1
*Elset, elset=Set-6, generate
    1,  1114,     1
**
** MATERIALS
**
*Material, name=steel
*Elastic
210000., 0.3
** ----------------------------------------------------------------
**
** STEP: Step-1
**
*Step, name=Step-1, nlgeom=NO
*Static
0.1, 1., 1e-05, 1.
**
** BOUNDARY CONDITIONS
**
** Name: BC-1 Type: Displacement/Rotation
*Boundary
Set-3, 1, 1
Set-3, 2, 2
Set-3, 3, 3
** Name: BC-2 Type: Displacement/Rotation
*Boundary
Set-4, 2, 2
** Name: BC-3 Type: Displacement/Rotation
*Boundary
Set-5, 3, 3
**
** LOADS
**
** Name: Load-1   Type: Concentrated force
*Cload
Set-1, 2, 100.
** Name: Load-2   Type: Concentrated force
*Cload
Set-2, 2, -100.
**
** OUTPUT REQUESTS
**
*Restart, write, frequency=0
**
** FIELD OUTPUT: F-Output-1
**
*Output, field, variable=PRESELECT
**
** HISTORY OUTPUT: H-Output-1
**
*Output, history, variable=PRESELECT
*End Step
