*Heading
** Job name: static_run_ver2 Model name: Model-1
** Generated by: Abaqus/CAE 6.14-1
*Preprint, echo=NO, model=NO, history=NO, contact=NO
**
** PARTS
**
*Part, name=Part-1
*Node
      1,           0.,          50.,          50.
      2,           0.,          50.,          45.
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*Element, type=C3D8R
   1,  232,  233,  244,  243,    1,    2,   13,   12
   2,  233,  234,  245,  244,    2,    3,   14,   13
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*Nset, nset=Set-1, generate
    1,  7161,     1
*Elset, elset=Set-1, generate
    1,  6000,     1
** Section: Section_solid_plate
*Solid Section, elset=Set-1, material=steel
,
*End Part
**
**
** ASSEMBLY
**
*Assembly, name=Assembly
**
*Instance, name=Part-1-1, part=Part-1
*End Instance
**
*Nset, nset=Set-1, instance=Part-1-1, generate
   1,  231,    1
*Elset, elset=Set-1, instance=Part-1-1, generate
   1,  200,    1
*Nset, nset=Set-2, instance=Part-1-1
 6941,
*Nset, nset=Set-3, instance=Part-1-1
 6931,
*Nset, nset=Set-4, instance=Part-1-1
 6931, 6941, 7041, 7051, 7151, 7161
*End Assembly
**
** MATERIALS
**
*Material, name=steel
*Density
 7.9e-09,
*Elastic
210000., 0.3
** ----------------------------------------------------------------
**
** STEP: linear_static
**
*Step, name=linear_static, nlgeom=NO
*Static
0.1, 1., 1e-05, 1.
**
** BOUNDARY CONDITIONS
**
** Name: BC-1 Type: Symmetry/Antisymmetry/Encastre
*Boundary
Set-1, ENCASTRE
**
** LOADS
**
** Name: Load-1   Type: Concentrated force
*Cload
Set-4, 2, -100.
**
** OUTPUT REQUESTS
**
*Restart, write, frequency=0
**
** FIELD OUTPUT: F-Output-1
**
*Output, field, variable=PRESELECT
**
** HISTORY OUTPUT: H-Output-1
**
*Output, history, variable=PRESELECT
*End Step
